new line.Switch_114_CLOSED lineCode=ughv_400al_triplex_ug_4w_bundled bus1=B2733 bus2=B141 length=0.00100000000000 units=km phases=4
new line.Switch_197_CLOSED lineCode=ughv_400al_triplex_ug_4w_bundled bus1=B1359 bus2=B579 length=0.00100000000000 units=km phases=4
new line.Switch_263_CLOSED lineCode=ughv_400al_triplex_ug_4w_bundled bus1=B1324 bus2=B2920 length=0.00100000000000 units=km phases=4
new line.Switch_1393_CLOSED lineCode=ughv_400al_triplex_ug_4w_bundled bus1=B2225 bus2=B2888 length=0.00100000000000 units=km phases=4
new line.Switch_1916_CLOSED lineCode=ughv_400al_triplex_ug_4w_bundled bus1=B238 bus2=B1122 length=0.00100000000000 units=km phases=4
new line.Switch_3066_CLOSED lineCode=ughv_400al_triplex_ug_4w_bundled bus1=B2501 bus2=B536 length=0.00100000000000 units=km phases=4
new line.Switch_4548_CLOSED lineCode=ughv_400al_triplex_ug_4w_bundled bus1=B3086 bus2=B681 length=0.00100000000000 units=km phases=4
